redirect /home/deras/Desktop/midrar_work_github/doe-egot-me/dss_files/testing_files/Master.dss
solve
export uuids Master.json
export cim100 substation=Fictitious geo=Oregon subgeo=Portland file=Master.xml
