redirect /home/deras/Desktop/midrar_work_github/doe-egot-me/support/upload_model_to_blazegraph/dss_files_no_loads/Master.dss
solve
export uuids Master.json
export cim100 substation=Fictitious geo=Oregon subgeo=Portland file=Master.xml
